**
**   Structure: cube subject to axial force;
**   Test objective: USER MATERIAL: ABAQUSATR2E
**
*NODE, NSET=Nall
       1,  1.00000e+00,  1.00000e+00,  0.00000e+00
       2,  1.00000e+00,  0.00000e+00,  0.00000e+00
       3,  1.00000e+00,  0.00000e+00,  1.00000e+00
       4,  1.00000e+00,  1.00000e+00,  1.00000e+00
       5,  0.00000e+00,  1.00000e+00,  0.00000e+00
       6,  0.00000e+00,  0.00000e+00,  0.00000e+00
       7,  0.00000e+00,  0.00000e+00,  1.00000e+00
       8,  0.00000e+00,  1.00000e+00,  1.00000e+00
       9,  1.00000e+00,  5.00000e-01,  0.00000e+00
      10,  1.00000e+00,  0.00000e+00,  5.00000e-01
      11,  1.00000e+00,  5.00000e-01,  1.00000e+00
      12,  1.00000e+00,  1.00000e+00,  5.00000e-01
      13,  5.00000e-01,  1.00000e+00,  0.00000e+00
      14,  5.00000e-01,  0.00000e+00,  0.00000e+00
      15,  5.00000e-01,  0.00000e+00,  1.00000e+00
      16,  5.00000e-01,  1.00000e+00,  1.00000e+00
      17,  0.00000e+00,  5.00000e-01,  0.00000e+00
      18,  0.00000e+00,  0.00000e+00,  5.00000e-01
      19,  0.00000e+00,  5.00000e-01,  1.00000e+00
      20,  0.00000e+00,  1.00000e+00,  5.00000e-01
*NSET,NSET=ONE
1
*ELEMENT, TYPE=C3D20R, ELSET=Eall
     1,     1,     2,     3,     4,     5,     6,     7,     8,     9,    10,
          11,    12,    17,    18,    19,    20,    13,    14,    15,    16
*NSET,NSET=FIX
6,7,8,17,18,19,20
*INITIAL CONDITIONS,TYPE=SOLUTION,USER
*MATERIAL,NAME=ABAQUSATR2E
*USER MATERIAL,CONSTANTS=5
1.,1.,1.,1.,1.
*DEPVAR
12
*SOLID SECTION,ELSET=Eall,MATERIAL=ABAQUSATR2E
**
*STEP,INC=100
*STATIC,DIRECT
0.1,1.0
*AMPLITUDE,NAME=A1
0.,1.0,1.0,1.0
*BOUNDARY
5,1,3,0.0
6,2,2,0.0
FIX,1,1,0.
*CLOAD,AMPLITUDE=A1
1,1,-0.4166666666666667
2,1,-0.4166666666666667
3,1,-0.4166666666666667
4,1,-0.4166666666666667
9,1,1.6666666666666667
10,1,1.6666666666666667
11,1,1.6666666666666667
12,1,1.6666666666666667
*NODE PRINT,NSET=One
U
*EL PRINT,ELSET=Eall
S,E
*EL FILE,ELSET=Eall
S,E
*END STEP
